*Heading
** Job name: ab Model name: Model-1
** Generated by: Abaqus/CAE Student Edition 6.13-2
*Preprint, echo=NO, model=NO, history=NO, contact=NO
** ----------------------------------------------------------------
**
** PART INSTANCE: AB-1
**
*Node
      1,          10.,          20.,          18.
      2,          10.,          20.,           5.
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*Element, type=C3D8R
 1,  20,  57,  13,   1,  65, 105,  82,  24
 2,  57,  58,  14,  13, 105, 106,  81,  82
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*Nset, nset=AB-1_A
   1,   2,   3,   4,   5,   6
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*Elset, elset=AB-1_A, generate
  1,  45,   1
*Nset, nset=AB-1_B
   2,   3,   6,   7,   9,  10
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*Elset, elset=AB-1_B, generate
 46,  60,   1
** Section: eA
*Solid Section, elset=AB-1_A, material=A
,
** Section: eB
*Solid Section, elset=AB-1_B, material=B
,
*System
*Elset, elset=_AB_2_AIR_S2, generate
 37,  60,   1
*Elset, elset=_AB_2_AIR_S5
  1,  2,  3, 10, 11, 12
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*Elset, elset=_AB_2_AIR_S6, generate
  1,  58,   3
*Elset, elset=_AB_2_AIR_S4, generate
 48,  60,   3
*Elset, elset=_AB_2_AIR_S3
  7,  8,  9, 16, 17, 18, 25, 26, 27, 34, 35, 36, 43, 44, 45
*Elset, elset=_AB_2_AIR_S1, generate
 1,  9,  1
*Surface, type=ELEMENT, name=AB_2_AIR
_AB_2_AIR_S2, S2
_AB_2_AIR_S5, S5
_AB_2_AIR_S6, S6
_AB_2_AIR_S4, S4
_AB_2_AIR_S3, S3
_AB_2_AIR_S1, S1
*Elset, elset=_B_2_C_S3, generate
 46,  48,   1
*Surface, type=ELEMENT, name=B_2_C
_B_2_C_S3, S3
**
** MATERIALS
**
*Material, name=A
*Elastic
1.,1.
*Material, name=B
*Elastic
2.,2.
